*HEADING
cubit(/Users/chovey/autotwin/mesh/tests/files/two_spheres.inp): 11/21/2022: 15:5
version: 16.08.0
**
********************************** P A R T S **********************************
*PART, NAME=Part-Default
**
********************************** N O D E S **********************************
*NODE, NSET=ALLNODES
       1,   -3.813357e-01,   -2.236986e-01,   -2.236838e-01
       2,   -4.149187e-01,   -1.399746e-01,   -2.548473e-01
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**
********************************** E L E M E N T S ****************************
*ELEMENT, TYPE=C3D8R, ELSET=PART-DEFAULT_1_EB1
    1409,     189,     187,     192,     196,     165,     176,     110,     166
    1410,     187,     188,     191,     192,     176,     185,     111,     110
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*ELEMENT, TYPE=C3D8R, ELSET=EB2
       1,    1251,    1252,    1253,    1242,    1250,    1254,     906,    1248
       2,    1252,    1258,    1260,    1253,    1254,    1257,    1261,     906
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*ELEMENT, TYPE=C3D8R, ELSET=EB3
     153,     979,     974,    1034,    1036,     977,     972,     788,     992
     154,     974,     975,    1032,    1034,     972,     971,     789,     788
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**
********************************** N O D E S E T S **********************************
*NSET, NSET=NS_PART-DEFAULT_1_NS_ALLNODES
       1,       2,       3,       4,       5,       6
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*NSET, NSET=NS2
     731,     732,     733,     734,     735,     736
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**
********************************** S I D E S E T S **********************************
*ELSET, ELSET=SS1_S2
     389,     390,     391,     392,     393,     394
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*SURFACE, NAME=SS1
SS1_S2, S2
*ELSET, ELSET=SS2_S2
     629,     630,     631,     632,     633,     634
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*SURFACE, NAME=SS2
SS2_S2, S2
**
********************************** P R O P E R T I E S ************************
*SOLID SECTION, ELSET=PART-DEFAULT_1_EB1, MATERIAL=DEFAULT-STEEL
*SOLID SECTION, ELSET=EB2, MATERIAL=Default-Steel
*SOLID SECTION, ELSET=EB3, MATERIAL=Default-Steel
**
*END PART
**
**
**
********************************** E N D   P A R T S **********************************
**
**
********************************** A S S E M B L Y ************************************
**
*ASSEMBLY, NAME=ASSEMBLY1
**
*INSTANCE, NAME=Part-Default_1, PART=Part-Default
*END INSTANCE
**
*END ASSEMBLY
**
**
**
*MATERIAL, NAME = DEFAULT-STEEL
*ELASTIC, TYPE=ISOTROPIC
2.068000e+05, 2.900000e-01
*DENSITY
7.000000e-06
*CONDUCTIVITY,TYPE=ISO
4.500000e-02
*SPECIFIC HEAT
5.000000e+02
**
*MATERIAL, NAME = Default-Steel
*ELASTIC, TYPE=ISOTROPIC
2.068000e+05, 2.900000e-01
*DENSITY
7.000000e-06
*CONDUCTIVITY,TYPE=ISO
4.500000e-02
*SPECIFIC HEAT
5.000000e+02
**
**
************************************** H I S T O R Y *************************************
**
*PREPRINT
**
**************************************** S T E P 1 ***************************************
*STEP,INC=100,NAME=DEFAULT SET
**
*STATIC
1, 1, 1e-05, 1
**
**
**
**
*END STEP
